# Эксперимент - наблюдение эффекта Коанда. Определение зависимости расстояния Xr,
# на котором поток прилипает к наклонной плоскости, в зависимости от угла наклона
# плоскости к направлению набегающего потока (к горизонтали) в данном случае. Данный
# эксперимент имеет большое практическое значение, т.к. эффект Коанда используется
# для создания безотрывного обтекания крыла, что активно используется в современном
# авиастроении.
# Полагаем что рабочее тело - вода, т.к. эксперимент проводился на земле и с водой
# проще всего провести эксперимент. Температуру полагаем равной 20 градусам Цельсия.
# Атмосферное давление (p_infty) 101325
# Вода истекает через прямоугольную щель в тонкостенном резервуаре и падает на
# плоскость, наклонённую к горизонту под углом α
# ОБОЗНАЧЕНИЯ
# b_IN | высота прямоугольной щели в дюймах b(IN) из таблицы
# b_mm | то же самое в мм
# l_to_b - отношение длины плоской пластины l к b
# aux - вспомогательная величина, введённая из за особенностей перемножения в
# маткаде.
# velocity - скорость струи воды в прямоугольном потоке ширины b (см картинку).
# Расшифровка таблицы с графика:
# IN - inch, дюйм = 25.4 мм
b_IN := [0.040; 0.060; 0.060; 0.100; 0.187; 0.100; 0.120; 0.120; 0.187]  # дюйм
b_mm := b_IN*25.4 = [1.016; 1.524; 1.524; 2.54; 4.7498; 2.54; 3.048; 3.048; 4.7498]  # мм
l_to_b := [300; 200; 200; 120; 64; 120; 50; 25; 64]
l_IN := vectorize(l_to_b*b_IN) = [12; 12; 12; 12; 11.968; 12; 6; 3; 11.968]
l_mm := l_IN*25.4 = [304.8; 304.8; 304.8; 304.8; 303.987; 304.8; 152.4; 76.2; 303.987]
p_infty := 101325  # Па
T := 273 + 20 = 293  # К
ρ := 1000  # кг/м^3
ν := 10^-6  # м^2/c
Re := [1630; 1630; 5500; 5500; 5500; 9500; 10000; 10000; 10000]
aux := [
    Re[0]/b_mm[0];
    Re[1]/b_mm[1];
    Re[2]/b_mm[2];
    Re[3]/b_mm[3];
    Re[4]/b_mm[4];
    Re[5]/b_mm[5];
    Re[6]/b_mm[6];
    Re[7]/b_mm[7];
    Re[8]/b_mm[8]
]*10^3 = [1604331; 1069554; 3608924; 2165354; 1157943; 3740157; 3280840; 3280840; 2105352]  # 1 / м
# Числа Рейнольдса малы
# значит течение
# ламинарное
p_velocity := ρ*ν^2*vectorize(aux*aux) = [2573.88; 1143.95; 13024.3; 4688.76; 1340.83; 13988.8; 10763.9; 10763.9; 4432.51]  # Па
p_0 := p_infty + p_velocity = [103899; 102469; 114349; 106014; 102666; 115314; 112089; 112089; 105758]  # Па
p_0/p_infty = [1.0254; 1.01129; 1.12854; 1.04627; 1.01323; 1.13806; 1.10623; 1.10623; 1.04375]  # Па
velocity := sqrt(2*(p_0 - p_infty)/ρ) = [2.26887; 1.51258; 5.10379; 3.06227; 1.63758; 5.28938; 4.63981; 4.63981; 2.97742]  # м / с
# Итак, мы определили реальные значения величин или их порядки, которые использовались
# и получались в данной лабораторной установке. Это позволит в точности воспроизвести
# эксперимент с помощью какого-либо решателя (solver).
# Для дальнейшей работы использовали Solidworks Flow Simulation
